# Q1:-
# Given :
P == 240 kW
V_L == 400 V
PF == 0.9
# A, Find the load current?
P == sqrt(3*V_L*I_L*Cosθ)
I_L == 240*10^3/(sqrt(3)*400*0.9)
I_L == 384.9*A
# B, Find the Kvar required to improve power factor.
Q_C == P(tanϕ_old - tanϕ_new)
ϕ_old == Cos^-1*0.9 == 25.84*°
° := π/180
ϕ_new == Cos^-1*0.95 == 18.19*°
Q_C == 240*10^3*(tan25.84 - tan18.19)
Q_C == 37.365*Kvar
# Q2:-
# Given :
Power == 60*H.P
PF == 0.85
# A, Select the breaker?
# Convert H.P to KW
Power == 60*0.746 == 44.76*kW
I_L == 44.76*10^3/(sqrt(3)*400*0.85)
I_L == 76*A
# B, Select the cable?
# Ic ≤ In ≤ Id
# Circuit load current (Ic)
# Protective Device nominal current rating (In)
# Current carrying capacity of the Circuit conductors (Id)
Id == In*1.15
Id == □
